# OpenSim document version 30000
AnalyzeTool H23s1Walk1:
  model_file: C:\Users\dbak576\Desktop\Duncan Bakke Modelling Files\Output\H23s1.osim
  replace_force_set: false
  results_directory: C:\Users\dbak576\Desktop\Duncan Bakke Modelling Files\Output\H23s1\Walk10
  output_precision: 8
  initial_time: 2.19
  final_time: 3.915
  solve_for_equilibrium_for_auxiliary_states: false
  maximum_number_of_integrator_steps: 20000
  maximum_integrator_step_size: 1
  minimum_integrator_step_size: 1e-8
  integrator_error_tolerance: 1e-5
  external_loads_file: C:\Users\dbak576\Desktop\Duncan Bakke Modelling Files\Output\H23s1\Walk10\Walk10ExternalLoads.xml
  coordinates_file: C:\Users\dbak576\Desktop\Duncan Bakke Modelling Files\Output\H23s1\Walk10\Walk10IKResults.mot
  lowpass_cutoff_frequency_for_coordinates: 6
  AnalysisSet Analyses:
    MuscleAnalysis: start_time=2.19 end_time=3.915 step_interval=1 in_degrees=true muscle_list=all
        moment_arm_coordinate_list=all compute_moments=true
