# OpenSim document version 30000
InverseKinematicsTool:
  results_directory: C:\Users\dbak576\Desktop\Duncan Bakke Modelling Files\Output\H27s1\Walk10
  input_directory: C:\Users\dbak576\Desktop\Duncan Bakke Modelling Files\Output\H27s1\Walk10
  model_file: C:\Users\dbak576\Desktop\Duncan Bakke Modelling Files\Output\H27s1.osim
  constraint_weight: Inf
  accuracy: 1e-5
  marker_file: C:\Users\dbak576\Desktop\Duncan Bakke Modelling Files\Output\H27s1\Walk10\Walk10.trc
  time_range: 2.725 4.345
  report_errors: true
  output_motion_file: C:\Users\dbak576\Desktop\Duncan Bakke Modelling Files\Output\H27s1\Walk10\Walk10IKResults.mot
  report_marker_locations: false
  IKTaskSet:
    IKMarkerTask LFHD: apply=true weight=1
    IKMarkerTask RFHD: apply=true weight=1
    IKMarkerTask LBHD: apply=true weight=1
    IKMarkerTask RBHD: apply=true weight=1
    IKMarkerTask C7: apply=true weight=1
    IKMarkerTask T10: apply=true weight=1
    IKMarkerTask CLAV: apply=true weight=0
    IKMarkerTask STRN: apply=true weight=1
    IKMarkerTask RBack: apply=true weight=1
    IKMarkerTask RASI: apply=true weight=1
    IKMarkerTask LASI: apply=true weight=1
    IKMarkerTask LPSI: apply=true weight=1
    IKMarkerTask RPSI: apply=true weight=1
    IKMarkerTask RTH1: apply=true weight=1
    IKMarkerTask RTH2: apply=true weight=1
    IKMarkerTask RTH3: apply=true weight=1
    IKMarkerTask RTH4: apply=true weight=1
    IKMarkerTask RTB1: apply=true weight=1
    IKMarkerTask RTB2: apply=true weight=1
    IKMarkerTask RTB3: apply=true weight=1
    IKMarkerTask RTB4: apply=true weight=1
    IKMarkerTask RLFC: apply=true weight=1
    IKMarkerTask RMFC: apply=false weight=1
    IKMarkerTask RLMAL: apply=true weight=1
    IKMarkerTask RMMAL: apply=true weight=1
    IKMarkerTask RCAL: apply=true weight=1
    IKMarkerTask RMT1: apply=true weight=1
    IKMarkerTask RMT5: apply=false weight=1
    IKMarkerTask RToe: apply=false weight=1
    IKMarkerTask LTH1: apply=true weight=1
    IKMarkerTask LTH2: apply=true weight=1
    IKMarkerTask LTH3: apply=true weight=1
    IKMarkerTask LTH4: apply=true weight=1
    IKMarkerTask LTB1: apply=true weight=1
    IKMarkerTask LTB2: apply=true weight=1
    IKMarkerTask LTB3: apply=true weight=1
    IKMarkerTask LTB4: apply=true weight=1
    IKMarkerTask LLFC: apply=true weight=1
    IKMarkerTask LMFC: apply=false weight=1
    IKMarkerTask LLMAL: apply=true weight=1
    IKMarkerTask LMMAL: apply=true weight=1
    IKMarkerTask LCAL: apply=true weight=1
    IKMarkerTask LMT1: apply=true weight=1
    IKMarkerTask LMT5: apply=true weight=1
    IKMarkerTask LToe: apply=true weight=1
